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/batch
! ANSYS input file written by Workbench version 17.1 RELEASE
! File used for geometry attach: D:\dmitry.khominich\heat\heat_files\dp0\SYS\DM\SYS.agdb
/title,heat--Steady-State Thermal (A5)
/com,--- Data in consistent CGS units. See Solving Units in the help system for more information.
/units,CGS
/prep7
! Turn off shape checking because checks already performed inside WB mesher.
! See help system for more information.
SHPP,OFF,,NOWARN
etcon,set             ! allow ANSYS to choose best KEYOP's for 180x elements
/com,*********** Nodes for the whole assembly ***********
NBLOCK,3,SOLID,     90,     90
(1i9,3e20.9e3)
        1    2.000000000E+000    6.000000000E+000    0.000000000E+000
        2    0.000000000E+000    6.000000000E+000    0.000000000E+000
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-1
/com,*********** Elements for Body 1 "Surface Body" ***********
et,1,55
keyo,1,3,3
EBLOCK,19,solid,70,70
(19i9)
        1        1        1        1        0        0        0        0        4        0        1       42       44       40       39
        1        1        1        1        0        0        0        0        4        0        2       39       72       71       42
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-1
