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/batch
! ANSYS input file written by Workbench version 17.1 RELEASE
! File used for geometry attach: D:\dmitry.khominich\heat\heat_files\dp0\SYS\DM\SYS.agdb
/title,heat--Steady-State Thermal (A5)
/com,--- Data in consistent CGS units. See Solving Units in the help system for more information.
/units,CGS
/prep7
! Turn off shape checking because checks already performed inside WB mesher.
! See help system for more information.
SHPP,OFF,,NOWARN
etcon,set             ! allow ANSYS to choose best KEYOP's for 180x elements
/com,*********** Nodes for the whole assembly ***********
nblock,3
(1i9,3e20.9e3)
        1    2.000000000E+000    6.000000000E+000    0.000000000E+000
        2    0.000000000E+000    6.000000000E+000    0.000000000E+000
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-1
/com,*********** Elements for Body 1 "Surface Body" ***********
et,1,55
keyo,1,3,3
eblock,19,solid,,70
(19i9)
        1        1        1        1        0        0        0        0        4        0        1       42       44       40       39
        1        1        1        1        0        0        0        0        4        0        2       39       72       71       42
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-1
/com,*********** Send User Defined Coordinate System(s) ***********
csys,0
toffst,273.15,  ! Temperature offset from absolute zero
/com,*********** Send Materials ***********
MP,DENS,1,7.85,	! g cm^-3
MP,ALPX,1,1.2e-05,	! C^-1
MP,C,1,4340000,	! erg g^-1 C^-1
MP,KXX,1,180000,	! dyne s^-1 C^-1
MP,RSVX,1,1.7e-05,	! ohm cm
MP,EX,1,2000000000000,	! dyne cm^-2
MP,NUXY,1,0.3,
MP,MURX,1,10000,

/com,*********** Send Sheet Properties ***********
r,1,1.
!************************* Model Summary ********************
!Surface Body,	Structural Steel,	matid,	1
!************************* End Model Summary ********************
esel,all
fcum,add                   ! add nodal forces up (needed in case have loads on the same edge,vertex)
/com,*********** Create Vertex Thermal Heat ***********
CMBLOCK,C0      ,NODE,        1
(8i10)
         7
cmsel,s,C0
f,all,heat,800000.
nsel,all
fcum                       ! reset default on fcum command since done sending WB F loads
/com,*********** Create "Convection" ***********
et,2,151
keyop,2,3,10   !get plane option and thickness from underlying element
eblock,10,,,5
(15i9)
       71        2        2        2        0        6        5
       72        2        2        2        0        5        4
       73        2        2        2        0        4        3
       74        2        2        2        0        3        1
       75        2        2        2        0        2        6
-1
esel,s,type,,2
keyop,2,8,2.
keyop,2,13,0.

*DIM,_convvari25,TABLE,2,1,1,TIME,
! Time values
_convvari25(1,0,1) = 0.
_convvari25(2,0,1) = 1.
! Load values
_convvari25(1,1,1) = 0.
_convvari25(2,1,1) = 34000.


*DIM,_loadvari25,TABLE,2,1,1,TIME,
! Time values
_loadvari25(1,0,1) = 0.
_loadvari25(2,0,1) = 1.
! Load values
_loadvari25(1,1,1) = -6.
_loadvari25(2,1,1) = -6.

esel,all
/com,***************** Define Uniform Initial temperature ***************
tunif,-6.
fini
/com,****************************************************************************
/com,*************************    SOLUTION       ********************************
/com,****************************************************************************
/solu
antype,0                   ! static analysis
!eqsl,sparse               ! using sparse solver which is default so no eqsl command needed
cntr,print,1               ! print out contact info and also make no initial contact an error
resc,,none                 ! Do not keep any restart files
rstsuppress,cont           ! Don't write contact results
dmpopt,emat,no             ! Don't combine emat file for DANSYS
dmpopt,esav,no             ! Don't combine esav file for DANSYS
/com,****************************************************
/com,******************* SOLVE FOR LS 1 ****************
esel,s,type,,2
nsle
sf,all,conv,%_convvari25%,%_loadvari25%
nsel,all
esel,all
autots,on
nsub,1,10,1
time,1.
outres,erase
outres,all,none
outres,nsol,all
outres,rsol,all
outres,fflux,all
esel,s,mat,,2
cm,_elmisc,elem
esel,all
outres,misc,all,_elmisc
cnvtol,heat,,.001,,10.	! Program Controlled. Set MINREF equivalent of 1e-6 Watts
! *********** WB SOLVE COMMAND ***********
! check interactive state
*get,ANSINTER_,active,,int
*if,ANSINTER_,ne,0,then
/eof
*endif
solve
/com *************** Write FE CONNECTORS *********
CEWRITE,file,ce,,INTE
/com,****************************************************
/com,*************** FINISHED SOLVE FOR LS 1 *************
*set,_DS_PROGRESS          ! turn off progress updates to avoid virus scanning bug
/post1
fini
