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/batch
! ANSYS input file written by Workbench version 17.2 RELEASE
! File used for geometry attach: C:\Users\vitaliy.schetinin\AppData\Local\Temp\WB_AE-W1_vitaliy.schetinin_4484_2\unsaved_project_files\dp0\SYS\DM\SYS.agdb
/title,unsaved_project--Steady-State Thermal (B5)
/com,--- Data in consistent NMM units. See Solving Units in the help system for more information.
/units,MPA
/prep7
! Turn off shape checking because checks already performed inside WB mesher.
! See help system for more information.
SHPP,OFF,,NOWARN
etcon,set             ! allow ANSYS to choose best KEYOP's for 180x elements
/com,*********** Nodes for the whole assembly ***********
nblock,3
(1i9,3e20.9e3)
        1    8.000000000E+002    5.000000000E+002    1.000000000E+002
        2    7.427050983E+002    6.763355757E+002    1.000000000E+002
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-1
/com,*********** Elements for Body 1 "Solid" ***********
et,1,70
eblock,19,solid,,214
(19i9)
        1        1        1        1        0        0        0        0        8        0        1       25       76       44       44       26       26       26       26
        1        1        1        1        0        0        0        0        8        0        2       26       43       76       76       44       44       44       44
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-1
/com,*********** Send User Defined Coordinate System(s) ***********
csys,0
toffst,273.15,  ! Temperature offset from absolute zero
/com,*********** Send Materials ***********
MP,DENS,1,7.85e-09,	! tonne mm^-3
MP,ALPX,1,1.2e-05,	! C^-1
MP,C,1,434000000,	! mm^2 s^-2 C^-1
MP,KXX,1,60.5,	! tonne mm s^-3 C^-1
MP,RSVX,1,0.00017,	! ohm mm
MP,EX,1,200000,	! tonne s^-2 mm^-1
MP,NUXY,1,0.3,
MP,MURX,1,10000,

!************************* Model Summary ********************
!Solid,	Structural Steel,	matid,	1
!************************* End Model Summary ********************
/com,*********** Send Named Selection as Node Component ***********
CMBLOCK,X1      ,NODE,       12
(8i10)
        11        17        18        19        20        21        31        42
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/com,*********** Send Named Selection as Node Component ***********
CMBLOCK,X0      ,NODE,       12
(8i10)
        12        22        27        28        29        30        32        37
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/com,*********** Send Named Selection as Node Component ***********
CMBLOCK,Y       ,NODE,       24
(8i10)
        11        12        13        14        15        16        17        22
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
/com,*********** Send Named Selection as Node Component ***********
CMBLOCK,ORIGIN  ,NODE,       20
(8i10)
         1         2         3         4         5         6         7         8
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/com,*********** Define Temperature Constraint ***********
CMBLOCK,_CM34   ,NODE,       12
(8i10)
        12        22        27        28        29        30        32        37
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
*DIM,_loadvari34,TABLE,2,1,1,TIME,
! Time values
_loadvari34(1,0,1) = 0.
_loadvari34(2,0,1) = 1.
! Load values
_loadvari34(1,1,1) = 22.
_loadvari34(2,1,1) = 0.

/com,*********** Define Temperature Constraint ***********
CMBLOCK,_CM36   ,NODE,       12
(8i10)
        11        17        18        19        20        21        31        42
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
*DIM,_loadvari36,TABLE,2,1,1,TIME,
! Time values
_loadvari36(1,0,1) = 0.
_loadvari36(2,0,1) = 1.
! Load values
_loadvari36(1,1,1) = 22.
_loadvari36(2,1,1) = 10.

/com,*********** Define Temperature Constraint ***********
CMBLOCK,_CM38   ,NODE,       24
(8i10)
        11        12        13        14        15        16        17        22
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

*DIM,_loadvari38,TABLE,2,1,1,TIME,
! Time values
_loadvari38(1,0,1) = 0.
_loadvari38(2,0,1) = 1.
! Load values
_loadvari38(1,1,1) = 22.
_loadvari38(2,1,1) = 5.

/com,*********** Define Temperature Constraint ***********
CMBLOCK,_CM40   ,NODE,       20
(8i10)
         1         2         3         4         5         6         7         8
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
*DIM,_loadvari40,TABLE,2,1,1,TIME,
! Time values
_loadvari40(1,0,1) = 0.
_loadvari40(2,0,1) = 1.
! Load values
_loadvari40(1,1,1) = 22.
_loadvari40(2,1,1) = 20.

fcum,add                   ! add nodal forces up (needed in case have loads on the same edge,vertex)
fcum                       ! reset default on fcum command since done sending WB F loads
/com,***************** Define Uniform Initial temperature ***************
tunif,22.
fini
/com,****************************************************************************
/com,*************************    SOLUTION       ********************************
/com,****************************************************************************
/solu
antype,0                   ! static analysis
!eqsl,sparse               ! using sparse solver which is default so no eqsl command needed
cntr,print,1               ! print out contact info and also make no initial contact an error
resc,,none                 ! Do not keep any restart files
/com,****************************************************
/com,******************* SOLVE FOR LS 1 ****************
d,_CM34,temp,%_loadvari34%
d,_CM36,temp,%_loadvari36%
d,_CM38,temp,%_loadvari38%
d,_CM40,temp,%_loadvari40%
autots,on
nsub,1,10,1
time,1.
outres,erase
outres,all,none
outres,nsol,all
outres,rsol,all
outres,fflux,all
cnvtol,heat,,.001,,1.e-003	! Program Controlled. Set MINREF equivalent of 1e-6 Watts
! *********** WB SOLVE COMMAND ***********
! check interactive state
*get,ANSINTER_,active,,int
*if,ANSINTER_,ne,0,then
/eof
*endif
solve
/com *************** Write FE CONNECTORS *********
CEWRITE,file,ce,,INTE
/com,****************************************************
/com,*************** FINISHED SOLVE FOR LS 1 *************
*set,_DS_PROGRESS          ! turn off progress updates to avoid virus scanning bug
/post1
fini
